# OpenSim document version 20302
MarkerSet gait2354_Scale:
  Marker XYPH: torso (0.1 0.238104 0)
  Marker RGTRO: femur_r (-0.0195348 -0.0228265 0.0763767)
  Marker LGTRO: femur_l (-0.0196275 -0.0232514 -0.0764739)
  Marker STRN: torso (0.0395 0.375601 0)
  Marker RASIS: pelvis (0.02 0.03 0.128)
  Marker LASIS: pelvis (0.02 0.03 -0.128)
  Marker SACR: pelvis (-0.19 0.01 0)
  Marker RPSIS: pelvis (-0.165 0.035 0.055)
  Marker LPSIS: pelvis (-0.165 0.035 -0.055)
  Marker C7: torso (-0.08 0.426 0)
  Marker RLEK: femur_r (0 -0.404 0.05)
  Marker RMEK: femur_r (0 -0.404 -0.05)
  Marker RCF: tibia_r (0.005 -0.065 0.05)
  Marker RTT: tibia_r (0.05 -0.08 0)
  Marker RLM: tibia_r (-0.005 -0.41 0.053)
  Marker RMM: tibia_r (0.006 -0.3888 -0.038)
  Marker RHEE: calcn_r (-0.02 0.02 0)
  Marker RMT5: calcn_r (0.142525 0.00671359 0.05625)
  Marker RMT2: calcn_r (0.187813 0.0147304 0.00724136)
  Marker RMT1: calcn_r (0.19 0.005 -0.04)
  Marker RTOE: calcn_r (0.26 0.005 0)
  Marker T10: torso (-0.09 0.12 0)
  Marker LLEK: femur_l (0 -0.404 -0.05)
  Marker LMEK: femur_l (0 -0.404 0.05)
  Marker LCF: tibia_l (0.005 -0.065 -0.05)
  Marker LTT: tibia_l (0.05 -0.08 0)
  Marker LLM: tibia_l (-0.005 -0.41 -0.053)
  Marker LMM: tibia_l (0.006 -0.3888 0.038)
  Marker LHEE: calcn_l (-0.02 0.02 0)
  Marker LMT2: calcn_l (0.187813 0.0147304 -0.00724136)
  Marker LMT5: calcn_l (0.142525 0.00671359 -0.05625)
  Marker LMT1: calcn_l (0.19 0.005 0.04)
  Marker LTOE: calcn_l (0.26 0.005 0)
